# OpenSim document version 40600
Model robot40_h160:
  gravity: 0 -9.80665 0
  length_units: meters
  force_units: N
  credits:
    Rajagopal, A, Dembia, C.L., DeMers, M.S., Delp, D.D., Hicks, J.L., and Delp, S.L.
  publications:
    Rajagopal, Apoorva, et al. "Full-Body Musculoskeletal Model for Muscle-Driven Simulation of Human Gait." IEEE Transactions on Biomedical Engineering 63.10 (2016): 2068-2079. (2016)
  Ground
  BodySet:
    Body pelvis: mass=6.252357 [kg] mass_center=(-0.06982716 0 0) inertia=(0.05323683 0.0451063 0.02998456 0 0 0)
        meshes=(r_pelvis.vtp l_pelvis.vtp sacrum.vtp)
      WrapCylinder Gmax1_at_pelvis_r: xyz_body_rotation=(-0.6 0.45 0) translation=(-0.08577836 -0.07788544 0.05599704)
          quadrant=-x radius=0.03808417 length=0.1391213
      WrapCylinder Gmax2_at_pelvis_r: xyz_body_rotation=(-0.75 0.39 0) translation=(-0.08912038 -0.06529789 0.06242293)
          quadrant=all radius=0.03862325 length=0.09007377
      WrapCylinder Gmax3_at_pelvis_r: xyz_body_rotation=(-0.1 0 0) translation=(-0.09246239 -0.0692315 0.06242293)
          quadrant=all radius=0.03804285 length=0.09167688
      WrapCylinder Gmax1_at_pelvis_l: xyz_body_rotation=(0.6 -0.45 0) translation=(-0.08577836 -0.07788544 -0.05599704)
          quadrant=-x radius=0.03808417 length=0.1391213
      WrapCylinder Gmax2_at_pelvis_l: xyz_body_rotation=(0.75 -0.39 0)
          translation=(-0.08912038 -0.06529789 -0.06242293) quadrant=all radius=0.03862325 length=0.09007377
      WrapCylinder Gmax3_at_pelvis_l: xyz_body_rotation=(0.1 0 0) translation=(-0.09246239 -0.0692315 -0.06242293)
          quadrant=all radius=0.03804285 length=0.09167688
      WrapCylinder PS_at_brim_r: xyz_body_rotation=(-0.25 -0.27 0.1) translation=(-0.08243635 -0.0472033 0.06021977)
          quadrant=-y radius=0.04744063 length=0.0926451
      WrapCylinder PS_at_brim_l: xyz_body_rotation=(0.25 0.27 0.1) translation=(-0.08243635 -0.0472033 -0.06021977)
          quadrant=-y radius=0.04744063 length=0.0926451
      WrapCylinder IL_at_brim_r: xyz_body_rotation=(-0.32 -0.24 0.9) translation=(-0.07909433 -0.0511369 0.06939961)
          quadrant=-y radius=0.05286947 length=0.09188634
      WrapCylinder IL_at_brim_l: xyz_body_rotation=(0.32 0.24 0.9) translation=(-0.07909433 -0.0511369 -0.06939961)
          quadrant=-y radius=0.05286947 length=0.09188634
    Body femur_r: mass=4.938072 mass_center=(0 -0.1679012 0) inertia=(0.06934252 0.01817717 0.07312296 0 0 0)
        meshes=r_femur.vtp
      WrapCylinder Gastroc_at_condyles_r: translation=(0.004501563 -0.3839339 0) quadrant=all radius=0.02295921
          length=0.1021934
      WrapCylinder KnExt_at_fem_r: xyz_body_rotation=(-0.0623366 0.0507601 0)
          translation=(0.003230574 -0.377128 0.002136976) quadrant=all radius=0.02296771 length=0.1021322
      WrapCylinder AB_at_femshaft_r: xyz_body_rotation=(1.66157 0.186644 0)
          translation=(0.01318364 -0.1054367 0.02387748) quadrant=all radius=0.01586365 length=0.06551399
      WrapCylinder AL_at_femshaft_r: xyz_body_rotation=(1.77711 0.136489 0)
          translation=(0.02766904 -0.2171652 0.0154452) quadrant=all radius=0.01929154 length=0.09394465
      WrapCylinder AMprox_at_femshaft_r: xyz_body_rotation=(1.61126 0.18656 0)
          translation=(0.004666311 -0.06826046 0.02596019) quadrant=all radius=0.0202917 length=0.06547426
      WrapCylinder AMmid_at_femshaft_r: xyz_body_rotation=(1.61139 0.13656 0)
          translation=(0.02071844 -0.1504937 0.02103569) quadrant=all radius=0.02057393 length=0.1123095
      WrapCylinder AMdist_at_femshaft_r: xyz_body_rotation=(1.71188 0.186636 0)
          translation=(0.02845573 -0.2441595 0.009570002) quadrant=all radius=0.02094932 length=0.1873824
      WrapCylinder AMisch_at_condyles_r: xyz_body_rotation=(1.71115 -0.463363 0)
          translation=(-0.02039307 -0.3528737 -0.003223557) quadrant=all radius=0.03856663 length=0.2233757
      WrapCylinder PECT_at_femshaft_r: xyz_body_rotation=(1.81295 0.276344 0)
          translation=(0.005479059 -0.07913056 0.03110818) quadrant=all radius=0.01440494 length=0.04692721
    Body tibia_r: mass=1.968295 mass_center=(0 -0.1843951 0) inertia=(0.02610055 0.002641127 0.02646305 0 0 0)
        meshes=(r_tibia.vtp r_fibula.vtp)
      WrapCylinder GasLat_at_shank_r: xyz_body_rotation=(2.96723 -0.279725 -1.47812)
          translation=(-0.00721616 -0.07202333 -0.002909707) quadrant=-y radius=0.05332837 length=0.0891848
      WrapCylinder GasMed_at_shank_r: xyz_body_rotation=(2.96723 0.0279725 -1.47812)
          translation=(-0.00721616 -0.07202333 -0.002909707) quadrant=-y radius=0.05350809 length=0.08846978
      WrapCylinder GR_at_condyles_r: xyz_body_rotation=(0 -0.4 0) translation=(-0.00292547 -0.01946577 0) quadrant=all
          radius=0.0348275 length=0.08965239
      WrapCylinder SM_at_condyles_r: xyz_body_rotation=(0 -0.1 0) translation=(-0.0009751568 -0.01946577 0)
          quadrant=all radius=0.03427702 length=0.08827095
      WrapCylinder ST_at_condyles_r: xyz_body_rotation=(0 -0.2 0) translation=(-0.001950314 -0.01995241 0) quadrant=all
          radius=0.04132972 length=0.08856039
      WrapCylinder BF_at_gastroc_r: translation=(-0.05655909 -0.0583973 0) quadrant=y radius=0.02922668
          length=0.1322594
    Body patella_r: mass=0.04772253 mass_center=(0.001777778 0.02607407 0)
        inertia=(1.549916e-6 7.079928e-6 7.079928e-6 0 0 0) meshes=r_patella.vtp
    Body talus_r: mass=0.05308956 mass_center=(0 0 0) inertia=(0.000517868 0.000517868 0.000517868 0 0 0)
        meshes=r_talus.vtp
    Body calcn_r: mass=0.6636195 mass_center=(0.09876543 0.02962963 0)
        inertia=(0.0007250152 0.002019685 0.002123259 0 0 0) meshes=r_foot.vtp
    Body toes_r: mass=0.114992 mass_center=(0.03417284 0.005925926 -0.01728395)
        inertia=(0.0003265158 0.0003783025 0.000517868 0 0 0) meshes=r_bofoot.vtp
    Body femur_l: mass=4.938072 mass_center=(0 -0.1679012 0) inertia=(0.06934252 0.01817717 0.07312296 0 0 0)
        meshes=l_femur.vtp
      WrapCylinder Gastroc_at_condyles_l: translation=(0.004501563 -0.3839339 0) quadrant=all radius=0.02295921
          length=0.1021934
      WrapCylinder KnExt_at_fem_l: xyz_body_rotation=(0.0623366 -0.0507601 0)
          translation=(0.003230574 -0.377128 -0.002136976) quadrant=all radius=0.02296771 length=0.1021322
      WrapCylinder AB_at_femshaft_l: xyz_body_rotation=(-1.66157 -0.186644 0)
          translation=(0.01318364 -0.1054367 -0.02387748) quadrant=all radius=0.01586365 length=0.06551399
      WrapCylinder AL_at_femshaft_l: xyz_body_rotation=(-1.77711 -0.136489 0)
          translation=(0.02766904 -0.2171652 -0.0154452) quadrant=all radius=0.01929154 length=0.09394465
      WrapCylinder AMprox_at_femshaft_l: xyz_body_rotation=(-1.61126 -0.18656 0)
          translation=(0.004666311 -0.06826046 -0.02596019) quadrant=all radius=0.0202917 length=0.06547426
      WrapCylinder AMmid_at_femshaft_l: xyz_body_rotation=(-1.61139 -0.13656 0)
          translation=(0.02071844 -0.1504937 -0.02103569) quadrant=all radius=0.02057393 length=0.1123095
      WrapCylinder AMdist_at_femshaft_l: xyz_body_rotation=(-1.71188 -0.186636 0)
          translation=(0.02845573 -0.2441595 -0.009570002) quadrant=all radius=0.02094932 length=0.1873824
      WrapCylinder AMisch_at_condyles_l: xyz_body_rotation=(-1.71115 0.463363 0)
          translation=(-0.02039307 -0.3528737 0.003223557) quadrant=all radius=0.03856663 length=0.2233757
      WrapCylinder PECT_at_femshaft_l: xyz_body_rotation=(-1.81295 -0.276344 0)
          translation=(0.005479059 -0.07913056 -0.03110818) quadrant=all radius=0.01440494 length=0.04692721
    Body tibia_l: mass=1.968295 mass_center=(0 -0.1843951 0) inertia=(0.02610055 0.002641127 0.02646305 0 0 0)
        meshes=(l_tibia.vtp l_fibula.vtp)
      WrapCylinder GasLat_at_shank_l: xyz_body_rotation=(-2.96723 0.279725 -1.47812)
          translation=(-0.00721616 -0.07202333 0.002909707) quadrant=-y radius=0.05332837 length=0.0891848
      WrapCylinder GasMed_at_shank_l: xyz_body_rotation=(-2.96723 -0.0279725 -1.47812)
          translation=(-0.00721616 -0.07202333 0.002909707) quadrant=-y radius=0.05350809 length=0.08846978
      WrapCylinder GR_at_condyles_l: xyz_body_rotation=(0 0.4 0) translation=(-0.00292547 -0.01946577 0) quadrant=all
          radius=0.0348275 length=0.08965239
      WrapCylinder SM_at_condyles_l: xyz_body_rotation=(0 0.1 0) translation=(-0.0009751568 -0.01946577 0) quadrant=all
          radius=0.03427702 length=0.08827095
      WrapCylinder ST_at_condyles_l: xyz_body_rotation=(0 0.2 0) translation=(-0.001950314 -0.01995241 0) quadrant=all
          radius=0.04132972 length=0.08856039
      WrapCylinder BF_at_gastroc_l: translation=(-0.05655909 -0.0583973 0) quadrant=all radius=0.02922668
          length=0.1322594
    Body patella_l: mass=0.04772253 mass_center=(0.001777778 0.02607407 0)
        inertia=(1.549916e-6 7.079928e-6 7.079928e-6 0 0 0) meshes=l_patella.vtp
    Body talus_l: mass=0.05308956 mass_center=(0 0 0) inertia=(0.000517868 0.000517868 0.000517868 0 0 0)
        meshes=l_talus.vtp
    Body calcn_l: mass=0.6636195 mass_center=(0.09876543 0.02962963 0)
        inertia=(0.0007250152 0.002019685 0.002123259 0 0 0) meshes=l_foot.vtp
    Body toes_l: mass=0.114992 mass_center=(0.03417284 0.005925926 -0.01728395)
        inertia=(0.0003265158 0.0003783025 0.000517868 0 0 0) meshes=l_bofoot.vtp
    Body torso: mass=14.24212 mass_center=(-0.02962963 0.3160494 0) inertia=(0.7635963 0.3912493 0.7412762 0 0 0)
        meshes=(hat_spine.vtp hat_jaw.vtp hat_skull.vtp hat_ribs_scap.vtp)
    Body humerus_r: mass=1.079045 mass_center=(0 -0.1624711 0) inertia=(0.006186451 0.002134134 0.006944092 0 0 0)
        meshes=humerus_rv.vtp
      WrapSphere wrap_shoulder_r_r: translation=(0 0 0) quadrant=all radius=0.039508
    Body ulna_r: mass=0.3225191 mass_center=(0 -0.119037 0) inertia=(0.001533925 0.0003200424 0.00166391 0 0 0)
        meshes=ulna_rv.vtp
    Body radius_r: mass=0.3225191 mass_center=(0 -0.119037 0) inertia=(0.001533925 0.0003200424 0.00166391 0 0 0)
        meshes=radius_rv.vtp
    Body hand_r: mass=0.2428847 mass_center=(0 -0.06725432 0) inertia=(0.0004619383 0.0002832738 0.0006939431 0 0 0)
        meshes=(pisiform_rvs.vtp lunate_rvs.vtp scaphoid_rvs.vtp triquetrum_rvs.vtp hamate_rvs.vtp capitate_rvs.vtp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)
    Body humerus_l: mass=1.079045 mass_center=(0 -0.1624711 0) inertia=(0.006186451 0.002134134 0.006944092 0 0 0)
        meshes=humerus_lv.vtp
      WrapSphere wrap_shoulder_r_l: translation=(0 0 0) quadrant=all radius=0.039508
    Body ulna_l: mass=0.3225191 mass_center=(0 -0.119037 0) inertia=(0.001533925 0.0003200424 0.00166391 0 0 0)
        meshes=ulna_lv.vtp
    Body radius_l: mass=0.3225191 mass_center=(0 -0.119037 0) inertia=(0.001533925 0.0003200424 0.00166391 0 0 0)
        meshes=radius_lv.vtp
    Body hand_l: mass=0.2428847 mass_center=(0 -0.06725432 0) inertia=(0.0004619383 0.0002832738 0.0006939431 0 0 0)
        meshes=(pisiform_lvs.vtp lunate_lvs.vtp scaphoid_lvs.vtp triquetrum_lvs.vtp hamate_lvs.vtp capitate_lvs.vtp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)
  JointSet:
    CustomJoint ground_pelvis: socket_parent_frame=ground_offset socket_child_frame=pelvis_offset
      Coordinate pelvis_tilt: default_value=0 range=(-3.141593 3.141593) clamped=true
      Coordinate pelvis_list: default_value=0 range=(-3.141593 3.141593) clamped=true
      Coordinate pelvis_rotation: default_value=0 range=(-3.141593 3.141593) clamped=true
      Coordinate pelvis_tx: default_value=0 range=(-40 40)
      Coordinate pelvis_ty: default_value=0.94 range=(-5 5) clamped=true
      Coordinate pelvis_tz: default_value=0 range=(-40 40)
      PhysicalOffsetFrame ground_offset: socket_parent=/ground translation=(0 0 0) [meters]
      PhysicalOffsetFrame pelvis_offset: socket_parent=/bodyset/pelvis translation=(0 0 0)
      SpatialTransform:
        TransformAxis rotation1: coordinates=pelvis_tilt axis=(0 0 1) LinearFunction(coefficients=1 0)
        TransformAxis rotation2: coordinates=pelvis_list axis=(1 0 0) LinearFunction(coefficients=1 0)
        TransformAxis rotation3: coordinates=pelvis_rotation axis=(0 1 0) LinearFunction(coefficients=1 0)
        TransformAxis translation1: coordinates=pelvis_tx axis=(1 0 0) LinearFunction(coefficients=1 0)
        TransformAxis translation2: coordinates=pelvis_ty axis=(0 1 0) LinearFunction(coefficients=1 0)
        TransformAxis translation3: coordinates=pelvis_tz axis=(0 0 1) LinearFunction(coefficients=1 0)
    CustomJoint hip_r: socket_parent_frame=pelvis_offset socket_child_frame=femur_r_offset
      Coordinate hip_flexion_r: default_value=0 range=(-0.5235988 2.094395) clamped=true
      Coordinate hip_adduction_r: default_value=0 range=(-0.8726646 0.5235988) clamped=true
      Coordinate hip_rotation_r: default_value=0 range=(-0.6981317 0.6981317) clamped=true
      PhysicalOffsetFrame pelvis_offset: socket_parent=/bodyset/pelvis translation=(-0.06269173 -0.06174978 0.07092347)
      PhysicalOffsetFrame femur_r_offset: socket_parent=/bodyset/femur_r translation=(0 0 0)
      SpatialTransform: axes_held_at_zero=(translation1 translation2 translation3)
        TransformAxis rotation1: coordinates=hip_flexion_r axis=(0 0 1) LinearFunction(coefficients=1 0)
        TransformAxis rotation2: coordinates=hip_adduction_r axis=(1 0 0) LinearFunction(coefficients=1 0)
        TransformAxis rotation3: coordinates=hip_rotation_r axis=(0 1 0) LinearFunction(coefficients=1 0)
    CustomJoint walker_knee_r: socket_parent_frame=femur_r_offset socket_child_frame=tibia_r_offset
      Coordinate knee_angle_r: default_value=0 range=(0 2.0944) clamped=true
      PhysicalOffsetFrame femur_r_offset: socket_parent=/bodyset/femur_r
          translation=(-0.007283529 -0.3820236 -0.002810318) orientation=(-1.64157 1.44618 1.5708) [radians]
      PhysicalOffsetFrame tibia_r_offset: socket_parent=/bodyset/tibia_r
          translation=(-0.00788857 -0.003440379 -0.001309139) orientation=(-1.64157 1.44618 1.5708)
      SpatialTransform: axes_held_at_zero=translation3
        TransformAxis rotation1: coordinates=knee_angle_r axis=(1 0 0) LinearFunction(coefficients=1 0)
        TransformAxis rotation2: coordinates=knee_angle_r axis=(0 0 1)
          SimmSpline: x=(0 0.174533 0.349066 0.523599 0.698132 0.872665 1.0472 1.22173 1.39626 1.5708 1.74533 1.91986 2.0944)
              y=(0 0.0126809 0.0226969 0.0296054 0.0332049 0.0335354 0.0308779 0.0257548 0.0189295 0.011407 0.00443314 -0.00050475 -0.0016782)
        TransformAxis rotation3: coordinates=knee_angle_r axis=(0 1 0)
          SimmSpline: x=(0 0.174533 0.349066 0.523599 0.698132 0.872665 1.0472 1.22173 1.39626 1.5708 1.74533 1.91986 2.0944)
              y=(0 0.059461 0.109399 0.150618 0.18392 0.210107 0.229983 0.24435 0.254012 0.25977 0.262428 0.262788 0.261654)
        TransformAxis translation1: coordinates=knee_angle_r axis=(0 1 0)
          MultiplierFunction: scale=0.9364242
            SimmSpline: x=(0 0.174533 0.349066 0.523599 0.698132 0.872665 1.0472 1.22173 1.39626 1.5708 1.74533 1.91986 2.0944)
                y=(0 0.000479 0.000835 0.001086 0.001251 0.001346 0.001391 0.001403 0.0014 0.0014 0.001421 0.001481 0.001599)
        TransformAxis translation2: coordinates=knee_angle_r axis=(0 0 1)
          MultiplierFunction: scale=1.021934
            SimmSpline: x=(0 0.174533 0.349066 0.523599 0.698132 0.872665 1.0472 1.22173 1.39626 1.5708 1.74533 1.91986 2.0944)
                y=(0 0.000988 0.001899 0.002734 0.003492 0.004173 0.004777 0.005305 0.005756 0.00613 0.006427 0.006648 0.006792)
    CustomJoint patellofemoral_r: socket_parent_frame=femur_r_offset socket_child_frame=patella_r_offset
      Coordinate knee_angle_r_beta: default_value=0 range=(-99999.9 99999.9) clamped=false
      PhysicalOffsetFrame femur_r_offset: socket_parent=/bodyset/femur_r
          translation=(-0.007283529 -0.3820236 -0.002810318)
      PhysicalOffsetFrame patella_r_offset: socket_parent=/bodyset/patella_r translation=(0 0 0)
      SpatialTransform: axes_held_at_zero=(rotation2 rotation3)
        TransformAxis rotation1: coordinates=knee_angle_r_beta axis=(0 0 1)
          SimmSpline: x=(0 0.174533 0.349066 0.523599 0.698132 0.872665 1.0472 1.22173 1.39626 1.5708 1.74533 1.91986 2.0944)
              y=(0.00113686 -0.00629212 -0.105582 -0.253683 -0.414245 -0.579047 -0.747244 -0.91799 -1.09044 -1.26379 -1.43763 -1.61186 -1.78634)
        TransformAxis translation1: coordinates=knee_angle_r_beta axis=(1 0 0)
          MultiplierFunction: scale=0.9003126
            SimmSpline: x=(0 0.174533 0.349066 0.523599 0.698132 0.872665 1.0472 1.22173 1.39626 1.5708 1.74533 1.91986 2.0944)
                y=(0.0524 0.0488 0.0437 0.0371 0.0296 0.0216 0.0136 0.0057 -0.0019 -0.0088 -0.0148 -0.0196 -0.0227)
        TransformAxis translation2: coordinates=knee_angle_r_beta axis=(0 1 0)
          MultiplierFunction: scale=0.9364242
            SimmSpline: x=(0 0.174533 0.349066 0.523599 0.698132 0.872665 1.0472 1.22173 1.39626 1.5708 1.74533 1.91986 2.0944)
                y=(-0.0108 -0.019 -0.0263 -0.0322 -0.0367 -0.0395 -0.0408 -0.0404 -0.0384 -0.0349 -0.0301 -0.0245 -0.0187)
        TransformAxis translation3: axis=(0 0 1) MultiplierFunction(scale=1.021934, Constant(value=0.00275))
    PinJoint ankle_r: socket_parent_frame=tibia_r_offset socket_child_frame=talus_r_offset
      Coordinate ankle_angle_r: default_value=0 range=(-0.6981317 0.5235988) clamped=true
      PhysicalOffsetFrame tibia_r_offset: socket_parent=/bodyset/tibia_r translation=(-0.009751568 -0.3893153 0)
          orientation=(0.175895 -0.105208 0.0186622)
      PhysicalOffsetFrame talus_r_offset: socket_parent=/bodyset/talus_r translation=(0 0 0)
          orientation=(0.175895 -0.105208 0.0186622)
    PinJoint subtalar_r: socket_parent_frame=talus_r_offset socket_child_frame=calcn_r_offset
      Coordinate subtalar_angle_r: default_value=0 range=(-0.3490659 0.3490659) clamped=true locked=true
      PhysicalOffsetFrame talus_r_offset: socket_parent=/bodyset/talus_r
          translation=(-0.0389826 -0.04997719 0.007895347) orientation=(-1.76819 0.906223 1.8196)
      PhysicalOffsetFrame calcn_r_offset: socket_parent=/bodyset/calcn_r translation=(0 0 0)
          orientation=(-1.76819 0.906223 1.8196)
    PinJoint mtp_r: socket_parent_frame=calcn_r_offset socket_child_frame=toes_r_offset
      Coordinate mtp_angle_r: default_value=0 range=(-0.5235988 0.5235988) clamped=true locked=true
      PhysicalOffsetFrame calcn_r_offset: socket_parent=/bodyset/calcn_r
          translation=(0.1626733 -0.001817975 0.001149195) orientation=(-3.14159 0.619901 0)
      PhysicalOffsetFrame toes_r_offset: socket_parent=/bodyset/toes_r translation=(0 0 0)
          orientation=(-3.14159 0.619901 0)
    CustomJoint hip_l: socket_parent_frame=pelvis_offset socket_child_frame=femur_l_offset
      Coordinate hip_flexion_l: default_value=0 range=(-0.5235988 2.094395) clamped=true
      Coordinate hip_adduction_l: default_value=0 range=(-0.8726646 0.5235988) clamped=true
      Coordinate hip_rotation_l: default_value=0 range=(-0.6981317 0.6981317) clamped=true
      PhysicalOffsetFrame pelvis_offset: socket_parent=/bodyset/pelvis
          translation=(-0.06269173 -0.06174978 -0.07092347)
      PhysicalOffsetFrame femur_l_offset: socket_parent=/bodyset/femur_l translation=(0 0 0)
      SpatialTransform: axes_held_at_zero=(translation1 translation2 translation3)
        TransformAxis rotation1: coordinates=hip_flexion_l axis=(0 0 1) LinearFunction(coefficients=1 0)
        TransformAxis rotation2: coordinates=hip_adduction_l axis=(1 0 0) LinearFunction(coefficients=-1 0)
        TransformAxis rotation3: coordinates=hip_rotation_l axis=(0 1 0) LinearFunction(coefficients=-1 0)
    CustomJoint walker_knee_l: socket_parent_frame=femur_l_offset socket_child_frame=tibia_l_offset
      Coordinate knee_angle_l: default_value=0 range=(0 2.0944) clamped=true
      PhysicalOffsetFrame femur_l_offset: socket_parent=/bodyset/femur_l
          translation=(-0.007283529 -0.3820236 0.002810318) orientation=(1.64157 -1.44618 1.5708)
      PhysicalOffsetFrame tibia_l_offset: socket_parent=/bodyset/tibia_l
          translation=(-0.00788857 -0.003440379 0.001309139) orientation=(1.64157 -1.44618 1.5708)
      SpatialTransform: axes_held_at_zero=translation3
        TransformAxis rotation1: coordinates=knee_angle_l axis=(-1 0 0) LinearFunction(coefficients=1 0)
        TransformAxis rotation2: coordinates=knee_angle_l axis=(0 0 1)
          SimmSpline: x=(0 0.174533 0.349066 0.523599 0.698132 0.872665 1.0472 1.22173 1.39626 1.5708 1.74533 1.91986 2.0944)
              y=(0 0.0126809 0.0226969 0.0296054 0.0332049 0.0335354 0.0308779 0.0257548 0.0189295 0.011407 0.00443314 -0.00050475 -0.0016782)
        TransformAxis rotation3: coordinates=knee_angle_l axis=(0 1 0)
          SimmSpline: x=(0 0.174533 0.349066 0.523599 0.698132 0.872665 1.0472 1.22173 1.39626 1.5708 1.74533 1.91986 2.0944)
              y=(0 -0.059461 -0.109399 -0.150618 -0.18392 -0.210107 -0.229983 -0.24435 -0.254012 -0.25977 -0.262428 -0.262788 -0.261654)
        TransformAxis translation1: coordinates=knee_angle_l axis=(0 1 0)
          MultiplierFunction: scale=0.9364242
            SimmSpline: x=(0 0.174533 0.349066 0.523599 0.698132 0.872665 1.0472 1.22173 1.39626 1.5708 1.74533 1.91986 2.0944)
                y=(0 0.000479 0.000835 0.001086 0.001251 0.001346 0.001391 0.001403 0.0014 0.0014 0.001421 0.001481 0.001599)
        TransformAxis translation2: coordinates=knee_angle_l axis=(0 0 1)
          MultiplierFunction: scale=1.021934
            SimmSpline: x=(0 0.174533 0.349066 0.523599 0.698132 0.872665 1.0472 1.22173 1.39626 1.5708 1.74533 1.91986 2.0944)
                y=(0 -0.000988 -0.001899 -0.002734 -0.003492 -0.004173 -0.004777 -0.005305 -0.005756 -0.00613 -0.006427 -0.006648 -0.006792)
    CustomJoint patellofemoral_l: socket_parent_frame=femur_l_offset socket_child_frame=patella_l_offset
      Coordinate knee_angle_l_beta: default_value=0 range=(-99999.9 99999.9) clamped=false
      PhysicalOffsetFrame femur_l_offset: socket_parent=/bodyset/femur_l
          translation=(-0.007283529 -0.3820236 0.002810318)
      PhysicalOffsetFrame patella_l_offset: socket_parent=/bodyset/patella_l translation=(0 0 0)
      SpatialTransform: axes_held_at_zero=(rotation2 rotation3)
        TransformAxis rotation1: coordinates=knee_angle_l_beta axis=(0 0 1)
          SimmSpline: x=(0 0.174533 0.349066 0.523599 0.698132 0.872665 1.0472 1.22173 1.39626 1.5708 1.74533 1.91986 2.0944)
              y=(0.00113686 -0.00629212 -0.105582 -0.253683 -0.414245 -0.579047 -0.747244 -0.91799 -1.09044 -1.26379 -1.43763 -1.61186 -1.78634)
        TransformAxis translation1: coordinates=knee_angle_l_beta axis=(1 0 0)
          MultiplierFunction: scale=0.9003126
            SimmSpline: x=(0 0.174533 0.349066 0.523599 0.698132 0.872665 1.0472 1.22173 1.39626 1.5708 1.74533 1.91986 2.0944)
                y=(0.0524 0.0488 0.0437 0.0371 0.0296 0.0216 0.0136 0.0057 -0.0019 -0.0088 -0.0148 -0.0196 -0.0227)
        TransformAxis translation2: coordinates=knee_angle_l_beta axis=(0 1 0)
          MultiplierFunction: scale=0.9364242
            SimmSpline: x=(0 0.174533 0.349066 0.523599 0.698132 0.872665 1.0472 1.22173 1.39626 1.5708 1.74533 1.91986 2.0944)
                y=(-0.0108 -0.019 -0.0263 -0.0322 -0.0367 -0.0395 -0.0408 -0.0404 -0.0384 -0.0349 -0.0301 -0.0245 -0.0187)
        TransformAxis translation3: axis=(0 0 1) MultiplierFunction(scale=1.021934, Constant(value=-0.00275))
    PinJoint ankle_l: socket_parent_frame=tibia_l_offset socket_child_frame=talus_l_offset
      Coordinate ankle_angle_l: default_value=0 range=(-0.6981317 0.5235988) clamped=true
      PhysicalOffsetFrame tibia_l_offset: socket_parent=/bodyset/tibia_l translation=(-0.009751568 -0.3893153 0)
          orientation=(-0.175895 0.105208 0.0186622)
      PhysicalOffsetFrame talus_l_offset: socket_parent=/bodyset/talus_l translation=(0 0 0)
          orientation=(-0.175895 0.105208 0.0186622)
    PinJoint subtalar_l: socket_parent_frame=talus_l_offset socket_child_frame=calcn_l_offset
      Coordinate subtalar_angle_l: default_value=0 range=(-0.3490659 0.3490659) clamped=true locked=true
      PhysicalOffsetFrame talus_l_offset: socket_parent=/bodyset/talus_l
          translation=(-0.0389826 -0.04997719 -0.007895347) orientation=(1.76819 -0.906223 1.8196)
      PhysicalOffsetFrame calcn_l_offset: socket_parent=/bodyset/calcn_l translation=(0 0 0)
          orientation=(1.76819 -0.906223 1.8196)
    PinJoint mtp_l: socket_parent_frame=calcn_l_offset socket_child_frame=toes_l_offset
      Coordinate mtp_angle_l: default_value=0 range=(-0.5235988 0.5235988) clamped=true locked=true
      PhysicalOffsetFrame calcn_l_offset: socket_parent=/bodyset/calcn_l
          translation=(0.1626733 -0.001817975 -0.001149195) orientation=(-3.14159 -0.619901 0)
      PhysicalOffsetFrame toes_l_offset: socket_parent=/bodyset/toes_l translation=(0 0 0)
          orientation=(-3.14159 -0.619901 0)
    CustomJoint back: socket_parent_frame=pelvis_offset socket_child_frame=torso_offset
      Coordinate lumbar_extension: default_value=0 range=(-1.570796 1.570796) clamped=true
      Coordinate lumbar_bending: default_value=0 range=(-1.570796 1.570796) clamped=true
      Coordinate lumbar_rotation: default_value=0 range=(-1.570796 1.570796) clamped=true
      PhysicalOffsetFrame pelvis_offset: socket_parent=/bodyset/pelvis translation=(-0.1121803 0.06411781 0)
      PhysicalOffsetFrame torso_offset: socket_parent=/bodyset/torso translation=(0 0 0)
      SpatialTransform: axes_held_at_zero=(translation1 translation2 translation3)
        TransformAxis rotation1: coordinates=lumbar_extension axis=(0 0 1) LinearFunction(coefficients=1 0)
        TransformAxis rotation2: coordinates=lumbar_bending axis=(1 0 0) LinearFunction(coefficients=1 0)
        TransformAxis rotation3: coordinates=lumbar_rotation axis=(0 1 0) LinearFunction(coefficients=1 0)
    CustomJoint acromial_r: socket_parent_frame=torso_offset socket_child_frame=humerus_r_offset
      Coordinate arm_flex_r: default_value=0 range=(-10 10)
      Coordinate arm_add_r: default_value=0 range=(-10 10)
      Coordinate arm_rot_r: default_value=0 range=(-10 10)
      PhysicalOffsetFrame torso_offset: socket_parent=/bodyset/torso translation=(0.003541364 0.3260724 0.1585267)
      PhysicalOffsetFrame humerus_r_offset: socket_parent=/bodyset/humerus_r translation=(0 0 0)
      SpatialTransform: axes_held_at_zero=(translation1 translation2 translation3)
        TransformAxis rotation1: coordinates=arm_flex_r axis=(0 0 1) LinearFunction(coefficients=1 0)
        TransformAxis rotation2: coordinates=arm_add_r axis=(1 0 0) LinearFunction(coefficients=1 0)
        TransformAxis rotation3: coordinates=arm_rot_r axis=(0 1 0) LinearFunction(coefficients=1 0)
    PinJoint elbow_r: socket_parent_frame=humerus_r_offset socket_child_frame=ulna_r_offset
      Coordinate elbow_flex_r: default_value=0 range=(0 2.618) clamped=true
      PhysicalOffsetFrame humerus_r_offset: socket_parent=/bodyset/humerus_r
          translation=(0.01237971 -0.2746797 -0.009591306) orientation=(-0.0228627 0.228018 0.0051689)
      PhysicalOffsetFrame ulna_r_offset: socket_parent=/bodyset/ulna_r translation=(0 0 0)
          orientation=(-0.0228627 0.228018 0.0051689)
    PinJoint radioulnar_r: socket_parent_frame=ulna_r_offset socket_child_frame=radius_r_offset
      Coordinate pro_sup_r: default_value=0 range=(0 1.570796) clamped=true
      PhysicalOffsetFrame ulna_r_offset: socket_parent=/bodyset/ulna_r
          translation=(-0.006523717 -0.01121174 0.02395062) orientation=(-1.56884 0.056428 1.53614)
      PhysicalOffsetFrame radius_r_offset: socket_parent=/bodyset/radius_r translation=(0 0 0)
          orientation=(-1.56884 0.056428 1.53614)
    UniversalJoint radius_hand_r: socket_parent_frame=radius_r_offset socket_child_frame=hand_r_offset
      Coordinate wrist_flex_r: default_value=0 range=(-1.22173 1.22173) clamped=true locked=true
      Coordinate wrist_dev_r: default_value=0 range=(-0.4363323 0.6108652) clamped=true locked=true
      PhysicalOffsetFrame radius_r_offset: socket_parent=/bodyset/radius_r
          translation=(-0.008531163 -0.2032896 0.01249733) orientation=(-1.5708 0 -1.5708)
      PhysicalOffsetFrame hand_r_offset: socket_parent=/bodyset/hand_r translation=(0 0 0)
          orientation=(-1.5708 0 -1.5708)
    CustomJoint acromial_l: socket_parent_frame=torso_offset socket_child_frame=humerus_l_offset
      Coordinate arm_flex_l: default_value=0 range=(-1.570796 1.570796) clamped=true
      Coordinate arm_add_l: default_value=0 range=(-2.094395 1.570796) clamped=true
      Coordinate arm_rot_l: default_value=0 range=(-1.570796 1.570796) clamped=true
      PhysicalOffsetFrame torso_offset: socket_parent=/bodyset/torso translation=(0.003541364 0.3260724 -0.1585267)
      PhysicalOffsetFrame humerus_l_offset: socket_parent=/bodyset/humerus_l translation=(0 0 0)
      SpatialTransform: axes_held_at_zero=(translation1 translation2 translation3)
        TransformAxis rotation1: coordinates=arm_flex_l axis=(0 0 1) LinearFunction(coefficients=1 0)
        TransformAxis rotation2: coordinates=arm_add_l axis=(-1 0 0) LinearFunction(coefficients=1 0)
        TransformAxis rotation3: coordinates=arm_rot_l axis=(0 -1 0) LinearFunction(coefficients=1 0)
    PinJoint elbow_l: socket_parent_frame=humerus_l_offset socket_child_frame=ulna_l_offset
      Coordinate elbow_flex_l: default_value=0 range=(0 2.618) clamped=true
      PhysicalOffsetFrame humerus_l_offset: socket_parent=/bodyset/humerus_l
          translation=(0.01237971 -0.2746797 0.009591306) orientation=(0.0228627 -0.228018 0.0051689)
      PhysicalOffsetFrame ulna_l_offset: socket_parent=/bodyset/ulna_l translation=(0 0 0)
          orientation=(0.0228627 -0.228018 0.0051689)
    PinJoint radioulnar_l: socket_parent_frame=ulna_l_offset socket_child_frame=radius_l_offset
      Coordinate pro_sup_l: default_value=0 range=(0 1.570796) clamped=true
      PhysicalOffsetFrame ulna_l_offset: socket_parent=/bodyset/ulna_l
          translation=(-0.006523717 -0.01121174 -0.02395062) orientation=(1.56884 -0.056428 1.53614)
      PhysicalOffsetFrame radius_l_offset: socket_parent=/bodyset/radius_l translation=(0 0 0)
          orientation=(1.56884 -0.056428 1.53614)
    UniversalJoint radius_hand_l: socket_parent_frame=radius_l_offset socket_child_frame=hand_l_offset
      Coordinate wrist_flex_l: default_value=0 range=(-1.22173 1.22173) clamped=true locked=true
      Coordinate wrist_dev_l: default_value=0 range=(-0.4363323 0.6108652) clamped=true locked=true
      PhysicalOffsetFrame radius_l_offset: socket_parent=/bodyset/radius_l
          translation=(-0.008531163 -0.2032896 -0.01249733) orientation=(1.5708 0 1.5708)
      PhysicalOffsetFrame hand_l_offset: socket_parent=/bodyset/hand_l translation=(0 0 0)
          orientation=(1.5708 0 1.5708)
  ConstraintSet:
    CoordinateCouplerConstraint patellofemoral_knee_angle_r_con: independent_coordinate_names=knee_angle_r
        dependent_coordinate_name=knee_angle_r_beta scale_factor=1
        coupled_coordinates_function=LinearFunction(coefficients=1 0)
    CoordinateCouplerConstraint patellofemoral_knee_angle_l_con: independent_coordinate_names=knee_angle_l
        dependent_coordinate_name=knee_angle_l_beta scale_factor=1
        coupled_coordinates_function=LinearFunction(coefficients=1 0)
  ForceSet:
    CoordinateActuator pro_sup_r: coordinate=pro_sup_r optimal_force=10
    CoordinateActuator wrist_flex_r: coordinate=wrist_flex_r optimal_force=10
    CoordinateActuator wrist_dev_r: coordinate=wrist_dev_r optimal_force=10
    CoordinateActuator pro_sup_l: coordinate=pro_sup_l optimal_force=10
    CoordinateActuator wrist_flex_l: coordinate=wrist_flex_l optimal_force=10
    CoordinateActuator wrist_dev_l: coordinate=wrist_dev_l optimal_force=10
    Millard2012EquilibriumMuscle [values shared by the 40 below unless stated]: min_control=0.01 max_control=1
        optimal_fiber_length=0.18 tendon_slack_length=0.12 pennation_angle_at_optimal=0 [radians]
        ignore_tendon_compliance=true ignore_activation_dynamics=true
      ActiveForceLengthCurve: minimum_value=0
      ForceVelocityCurve: concentric_slope_at_vmax=0 concentric_slope_near_vmax=0.25 isometric_slope=5
          eccentric_slope_at_vmax=0 eccentric_slope_near_vmax=0.15 max_eccentric_velocity_force_multiplier=1.4
      FiberForceLengthCurve
      TendonForceLengthCurve
    Millard2012EquilibriumMuscle lower_M0_r: max_isometric_force=2776.41
      PathPoint lower_M0_r_p0: pelvis (-0.02759426 -0.05151478 0.08380439)
      PathPoint lower_M0_r_p1: femur_r (-0.06757771 -0.2760761 -0.04167886)
      PathPoint lower_M0_r_p2: tibia_r (-0.03569105 -0.0404315 0.0440894)
      PathPoint lower_M0_r_p3: calcn_r (0.01022436 0.02393026 0.04167914)
    Millard2012EquilibriumMuscle lower_M1_r: max_isometric_force=1004.806
      PathPoint lower_M1_r_p0: pelvis (-0.05172777 -0.0539122 0.03789234)
      PathPoint lower_M1_r_p1: femur_r (-0.005605006 -0.3926958 -0.05917552)
      PathPoint lower_M1_r_p2: tibia_r (-0.06468362 -0.07899053 0.009957096)
      PathPoint lower_M1_r_p3: calcn_r (0.04747581 0.04453795 0.01278758)
    Millard2012EquilibriumMuscle lower_M2_r: max_isometric_force=1086.159
      PathPoint lower_M2_r_p0: pelvis (-0.1001421 -0.08796628 0.06715002)
      PathPoint lower_M2_r_p1: femur_r (-0.001304222 -0.3824438 -0.0592133)
      PathPoint lower_M2_r_p2: tibia_r (0.01758313 -0.3577487 0.02731563)
      PathPoint lower_M2_r_p3: calcn_r (0.06246588 0.05034671 0.02290958)
    Millard2012EquilibriumMuscle lower_M3_r: max_isometric_force=1163.789
      PathPoint lower_M3_r_p0: pelvis (-0.05155652 -0.05281459 0.08917847)
      PathPoint lower_M3_r_p1: femur_r (0.02068867 -0.406651 0.002343695)
      PathPoint lower_M3_r_p2: tibia_r (0.01449576 -0.06167015 0.006786826)
      PathPoint lower_M3_r_p3: calcn_r (0.02434078 0.04695109 -0.02129069)
    Millard2012EquilibriumMuscle lower_M4_r: max_isometric_force=2926.365
      PathPoint lower_M4_r_p0: pelvis (-0.1139644 -0.09583347 0.06599345)
      PathPoint lower_M4_r_p1: femur_r (-0.0100359 -0.386386 -0.05921401)
      PathPoint lower_M4_r_p2: tibia_r (-0.06335505 -0.01980275 0.04933796)
      PathPoint lower_M4_r_p3: calcn_r (0.04348619 0.05554494 0.03877861)
    Millard2012EquilibriumMuscle lower_M5_r: max_isometric_force=198.2912
      PathPoint lower_M5_r_p0: pelvis (-0.03979155 -0.0416743 0.1578112)
      PathPoint lower_M5_r_p1: femur_r (0.02789754 -0.406462 0.03421322)
      PathPoint lower_M5_r_p2: tibia_r (0.05919851 -0.07911861 -0.001210878)
      PathPoint lower_M5_r_p3: calcn_r (0.09121534 0.03566185 0.04767275)
    Millard2012EquilibriumMuscle lower_M6_r: max_isometric_force=1365.801
      PathPoint lower_M6_r_p0: femur_r (0.007196042 -0.4133603 0.04972963)
      PathPoint lower_M6_r_p1: tibia_r (-0.001770473 -0.2790779 0.001127285)
    Millard2012EquilibriumMuscle lower_M7_r: max_isometric_force=998.6924
      PathPoint lower_M7_r_p0: pelvis (-0.07764482 -0.07344107 0.07312729)
      PathPoint lower_M7_r_p1: femur_r (-0.008600409 -0.3825419 -0.05921351)
      PathPoint lower_M7_r_p2: tibia_r (-0.04059242 -0.01980256 0.04754215)
      PathPoint lower_M7_r_p3: calcn_r (-0.02738473 0.01975125 0.006434557)
    Millard2012EquilibriumMuscle lower_M0_l: max_isometric_force=2776.41
      PathPoint lower_M0_l_p0: pelvis (-0.02759426 -0.05151478 -0.08380439)
      PathPoint lower_M0_l_p1: femur_l (-0.06757771 -0.2760761 0.04167886)
      PathPoint lower_M0_l_p2: tibia_l (-0.03569105 -0.0404315 -0.0440894)
      PathPoint lower_M0_l_p3: calcn_l (0.01022436 0.02393026 -0.04167914)
    Millard2012EquilibriumMuscle lower_M1_l: max_isometric_force=1004.806
      PathPoint lower_M1_l_p0: pelvis (-0.05172777 -0.0539122 -0.03789234)
      PathPoint lower_M1_l_p1: femur_l (-0.005605006 -0.3926958 0.05917552)
      PathPoint lower_M1_l_p2: tibia_l (-0.06468362 -0.07899053 -0.009957096)
      PathPoint lower_M1_l_p3: calcn_l (0.04747581 0.04453795 -0.01278758)
    Millard2012EquilibriumMuscle lower_M2_l: max_isometric_force=1086.159
      PathPoint lower_M2_l_p0: pelvis (-0.1001421 -0.08796628 -0.06715002)
      PathPoint lower_M2_l_p1: femur_l (-0.001304222 -0.3824438 0.0592133)
      PathPoint lower_M2_l_p2: tibia_l (0.01758313 -0.3577487 -0.02731563)
      PathPoint lower_M2_l_p3: calcn_l (0.06246588 0.05034671 -0.02290958)
    Millard2012EquilibriumMuscle lower_M3_l: max_isometric_force=1163.789
      PathPoint lower_M3_l_p0: pelvis (-0.05155652 -0.05281459 -0.08917847)
      PathPoint lower_M3_l_p1: femur_l (0.02068867 -0.406651 -0.002343695)
      PathPoint lower_M3_l_p2: tibia_l (0.01449576 -0.06167015 -0.006786826)
      PathPoint lower_M3_l_p3: calcn_l (0.02434078 0.04695109 0.02129069)
    Millard2012EquilibriumMuscle lower_M4_l: max_isometric_force=2926.365
      PathPoint lower_M4_l_p0: pelvis (-0.1139644 -0.09583347 -0.06599345)
      PathPoint lower_M4_l_p1: femur_l (-0.0100359 -0.386386 0.05921401)
      PathPoint lower_M4_l_p2: tibia_l (-0.06335505 -0.01980275 -0.04933796)
      PathPoint lower_M4_l_p3: calcn_l (0.04348619 0.05554494 -0.03877861)
    Millard2012EquilibriumMuscle lower_M5_l: max_isometric_force=198.2912
      PathPoint lower_M5_l_p0: pelvis (-0.03979155 -0.0416743 -0.1578112)
      PathPoint lower_M5_l_p1: femur_l (0.02789754 -0.406462 -0.03421322)
      PathPoint lower_M5_l_p2: tibia_l (0.05919851 -0.07911861 0.001210878)
      PathPoint lower_M5_l_p3: calcn_l (0.09121534 0.03566185 -0.04767275)
    Millard2012EquilibriumMuscle lower_M6_l: max_isometric_force=1365.801
      PathPoint lower_M6_l_p0: femur_l (0.007196042 -0.4133603 -0.04972963)
      PathPoint lower_M6_l_p1: tibia_l (-0.001770473 -0.2790779 -0.001127285)
    Millard2012EquilibriumMuscle lower_M7_l: max_isometric_force=998.6924
      PathPoint lower_M7_l_p0: pelvis (-0.07764482 -0.07344107 -0.07312729)
      PathPoint lower_M7_l_p1: femur_l (-0.008600409 -0.3825419 0.05921351)
      PathPoint lower_M7_l_p2: tibia_l (-0.04059242 -0.01980256 -0.04754215)
      PathPoint lower_M7_l_p3: calcn_l (-0.02738473 0.01975125 -0.006434557)
    Millard2012EquilibriumMuscle trunk_M0: max_isometric_force=449.5796
      PathPoint trunk_M0_p0: pelvis (-0.09182792 -0.004159934 0.1380069)
      PathPoint trunk_M0_p1: torso (0.07154169 0.02967322 0.0250219)
    Millard2012EquilibriumMuscle trunk_M1: max_isometric_force=447.2023
      PathPoint trunk_M1_p0: pelvis (-0.09485228 0.04350491 -0.1114592)
      PathPoint trunk_M1_p1: torso (0.09835232 0.11113 -0.0008191711)
    Millard2012EquilibriumMuscle trunk_M2: max_isometric_force=1172.988
      PathPoint trunk_M2_p0: pelvis (-0.1653164 0.05519667 -0.04607901)
      PathPoint trunk_M2_p1: torso (-0.1322355 0.2674239 0.05920022)
    Millard2012EquilibriumMuscle trunk_M3: max_isometric_force=694.0298
      PathPoint trunk_M3_p0: pelvis (-0.1777373 0.07389832 0.07726644)
      PathPoint trunk_M3_p1: torso (-0.06437913 0.2509984 -0.03649693)
    Millard2012EquilibriumMuscle shoulder_M0_r: max_isometric_force=74.15485
      PathPoint shoulder_M0_r_p0: torso (0.005920459 0.355572 0.1846991)
      PathPoint shoulder_M0_r_p1: humerus_r (0.06684538 -0.1563204 -0.06913899)
      PathWrap: wrap_object=wrap_shoulder_r_r method=hybrid
    Millard2012EquilibriumMuscle shoulder_M1_r: max_isometric_force=1510.289
      PathPoint shoulder_M1_r_p0: torso (0.005602805 0.3550998 0.1852483)
      PathPoint shoulder_M1_r_p1: humerus_r (0.06913897 -0.1360444 -0.069139)
      PathWrap: wrap_object=wrap_shoulder_r_r method=hybrid
    Millard2012EquilibriumMuscle shoulder_M2_r: max_isometric_force=576.1849
      PathPoint shoulder_M2_r_p0: torso (-0.0088379 0.3070503 0.1912549)
      PathPoint shoulder_M2_r_p1: humerus_r (-0.03043175 -0.1475236 -0.069139)
      PathWrap: wrap_object=wrap_shoulder_r_r method=hybrid
    Millard2012EquilibriumMuscle shoulder_M3_r: max_isometric_force=1846.395
      PathPoint shoulder_M3_r_p0: torso (-0.00165355 0.3404757 0.194947)
      PathPoint shoulder_M3_r_p1: humerus_r (0.069139 -0.1243818 0.006456933)
      PathWrap: wrap_object=wrap_shoulder_r_r method=hybrid
    Millard2012EquilibriumMuscle shoulder_M4_r: max_isometric_force=1730.701
      PathPoint shoulder_M4_r_p0: torso (-0.0004154575 0.3143081 0.2123411)
      PathPoint shoulder_M4_r_p1: humerus_r (-0.004208331 -0.2094229 -0.02286084)
      PathWrap: wrap_object=wrap_shoulder_r_r method=hybrid
    Millard2012EquilibriumMuscle shoulder_M5_r: max_isometric_force=1112.139
      PathPoint shoulder_M5_r_p0: torso (0.005991916 0.355572 0.1846926)
      PathPoint shoulder_M5_r_p1: humerus_r (0.06913879 -0.152695 -0.06913899)
      PathWrap: wrap_object=wrap_shoulder_r_r method=hybrid
    Millard2012EquilibriumMuscle shoulder_M6_r: max_isometric_force=1626.326
      PathPoint shoulder_M6_r_p0: torso (0.003507929 0.3312258 0.1050313)
      PathPoint shoulder_M6_r_p1: humerus_r (0.05579675 -0.2312815 0.00440663)
      PathWrap: wrap_object=wrap_shoulder_r_r method=hybrid
    Millard2012EquilibriumMuscle shoulder_M7_r: max_isometric_force=1048.291
      PathPoint shoulder_M7_r_p0: torso (-0.00759637 0.3164228 0.1218698)
      PathPoint shoulder_M7_r_p1: humerus_r (-0.03352082 -0.1544912 -0.06913899)
      PathWrap: wrap_object=wrap_shoulder_r_r method=hybrid
    Millard2012EquilibriumMuscle shoulder_M0_l: max_isometric_force=74.15485
      PathPoint shoulder_M0_l_p0: torso (0.005920459 0.355572 -0.1846991)
      PathPoint shoulder_M0_l_p1: humerus_l (0.06684538 -0.1563204 0.06913899)
      PathWrap: wrap_object=wrap_shoulder_r_l method=hybrid
    Millard2012EquilibriumMuscle shoulder_M1_l: max_isometric_force=1510.289
      PathPoint shoulder_M1_l_p0: torso (0.005602805 0.3550998 -0.1852483)
      PathPoint shoulder_M1_l_p1: humerus_l (0.06913897 -0.1360444 0.069139)
      PathWrap: wrap_object=wrap_shoulder_r_l method=hybrid
    Millard2012EquilibriumMuscle shoulder_M2_l: max_isometric_force=576.1849
      PathPoint shoulder_M2_l_p0: torso (-0.0088379 0.3070503 -0.1912549)
      PathPoint shoulder_M2_l_p1: humerus_l (-0.03043175 -0.1475236 0.069139)
      PathWrap: wrap_object=wrap_shoulder_r_l method=hybrid
    Millard2012EquilibriumMuscle shoulder_M3_l: max_isometric_force=1846.395
      PathPoint shoulder_M3_l_p0: torso (-0.00165355 0.3404757 -0.194947)
      PathPoint shoulder_M3_l_p1: humerus_l (0.069139 -0.1243818 -0.006456933)
      PathWrap: wrap_object=wrap_shoulder_r_l method=hybrid
    Millard2012EquilibriumMuscle shoulder_M4_l: max_isometric_force=1730.701
      PathPoint shoulder_M4_l_p0: torso (-0.0004154575 0.3143081 -0.2123411)
      PathPoint shoulder_M4_l_p1: humerus_l (-0.004208331 -0.2094229 0.02286084)
      PathWrap: wrap_object=wrap_shoulder_r_l method=hybrid
    Millard2012EquilibriumMuscle shoulder_M5_l: max_isometric_force=1112.139
      PathPoint shoulder_M5_l_p0: torso (0.005991916 0.355572 -0.1846926)
      PathPoint shoulder_M5_l_p1: humerus_l (0.06913879 -0.152695 0.06913899)
      PathWrap: wrap_object=wrap_shoulder_r_l method=hybrid
    Millard2012EquilibriumMuscle shoulder_M6_l: max_isometric_force=1626.326
      PathPoint shoulder_M6_l_p0: torso (0.003507929 0.3312258 -0.1050313)
      PathPoint shoulder_M6_l_p1: humerus_l (0.05579675 -0.2312815 -0.00440663)
      PathWrap: wrap_object=wrap_shoulder_r_l method=hybrid
    Millard2012EquilibriumMuscle shoulder_M7_l: max_isometric_force=1048.291
      PathPoint shoulder_M7_l_p0: torso (-0.00759637 0.3164228 -0.1218698)
      PathPoint shoulder_M7_l_p1: humerus_l (-0.03352082 -0.1544912 0.06913899)
      PathWrap: wrap_object=wrap_shoulder_r_l method=hybrid
    Millard2012EquilibriumMuscle elbow_M0_r: max_isometric_force=2327.05
      PathPoint elbow_M0_r_p0: humerus_r (0.02849908 -0.04436098 0.01353719)
      PathPoint elbow_M0_r_p1: ulna_r (0.0212454 -0.04002086 0.03438168)
    Millard2012EquilibriumMuscle elbow_M1_r: max_isometric_force=1834.863
      PathPoint elbow_M1_r_p0: humerus_r (-0.05109663 -0.03986303 0.03192213)
      PathPoint elbow_M1_r_p1: ulna_r (-0.02953469 0.03528644 -0.02477471)
    Millard2012EquilibriumMuscle elbow_M0_l: max_isometric_force=2327.05
      PathPoint elbow_M0_l_p0: humerus_l (0.02849908 -0.04436098 -0.01353719)
      PathPoint elbow_M0_l_p1: ulna_l (0.0212454 -0.04002086 -0.03438168)
    Millard2012EquilibriumMuscle elbow_M1_l: max_isometric_force=1834.863
      PathPoint elbow_M1_l_p0: humerus_l (-0.05109663 -0.03986303 -0.03192213)
      PathPoint elbow_M1_l_p1: ulna_l (-0.02953469 0.03528644 0.02477471)
    ObjectGroup right_leg
    ObjectGroup left_leg
    ObjectGroup hip_add_r
    ObjectGroup hip_abd_r
    ObjectGroup hip_flex_r
    ObjectGroup hip_ext_r
    ObjectGroup hip_inrot_r
    ObjectGroup hip_exrot_r
    ObjectGroup knee_flex_r
    ObjectGroup knee_ext_r
    ObjectGroup ankle_df_r
    ObjectGroup ankle_pf_r
    ObjectGroup everter_r
    ObjectGroup inverter_r
    ObjectGroup hip_add_l
    ObjectGroup hip_abd_l
    ObjectGroup hip_flex_l
    ObjectGroup hip_ext_l
    ObjectGroup hip_exrot_l
    ObjectGroup hip_inrot_l
    ObjectGroup knee_flex_l
    ObjectGroup knee_ext_l
    ObjectGroup ankle_df_l
    ObjectGroup ankle_pf_l
    ObjectGroup everter_l
    ObjectGroup inverter_l
  MarkerSet:
    Marker LHEAD: torso (0.01714051 0.5842463 -0.08241764)
    Marker THEAD: torso (0.003458011 0.6425266 1.157478e-5)
    Marker RHEAD: torso (0.001909301 0.5936273 0.07964674)
    Marker FHEAD: torso (0.100568 0.5898163 -0.02765636)
    Marker C7: torso (-0.07526453 0.3826598 0.002729938) fixed=true
    Marker T10: torso (-0.05745598 0.07419369 0.008174398)
    Marker SACR: pelvis (-0.2023011 -0.0272652 -0.001630807) fixed=true
    Marker NAVE: torso (0.1387166 0.0180604 0.002374736) fixed=true
    Marker XYPH: torso (0.1352552 0.1840386 -0.005384118) fixed=true
    Marker STRN: torso (0.08086754 0.3297069 -0.003176921) fixed=true
    Marker BBAC: torso (-0.09395664 0.2104142 0.1291052) fixed=true
    Marker LSHO: torso (-0.008455493 0.3726623 -0.1225519) fixed=true
    Marker LDELT: torso (-0.01648773 0.2415659 -0.2194943)
    Marker LMEE: humerus_l (-0.002101087 -0.2731583 0.05048634) fixed=true
    Marker LLEE: humerus_l (0.02117806 -0.2638843 -0.04752013) fixed=true
    Marker LFRM: radius_l (-0.03387609 -0.1348652 -0.03147166)
    Marker LMW: radius_l (0.002785426 -0.1946428 -0.04267696) fixed=true
    Marker LLW: radius_l (-0.02462955 -0.1931742 0.0165464) fixed=true
    Marker RSHO: torso (-0.003581656 0.3722971 0.1238324) fixed=true
    Marker RDELT: torso (0.03476036 0.236451 0.2216024)
    Marker RMEE: humerus_r (0.003107608 -0.2684664 -0.0509172) fixed=true
    Marker RLEE: humerus_r (0.02140073 -0.2632009 0.04140194) fixed=true
    Marker RFRM: radius_r (-0.02808592 -0.05148333 0.03060723)
    Marker RMW: radius_r (0.001959563 -0.1943976 0.04294272) fixed=true
    Marker RLW: radius_r (-0.02460564 -0.1933377 -0.01749606) fixed=true
    Marker LASIS: pelvis (0.01426851 0.01414861 -0.1144284) fixed=true
    Marker RASIS: pelvis (0.01444418 0.01462092 0.1137609) fixed=true
    Marker LPSIS: pelvis (-0.1744026 0.02727487 -0.03948449) fixed=true
    Marker RPSIS: pelvis (-0.1743662 0.02748057 0.03969863) fixed=true
    Marker LGTRO: femur_l (-0.01390563 -0.0179965 -0.09083707) fixed=true
    Marker FLTHI: femur_l (0.08362692 -0.2060312 0.01510924)
    Marker LLEK: femur_l (-0.00355447 -0.3768787 -0.05162848) fixed=true
    Marker LATI: tibia_l (0.0242902 -0.2211955 -2.446447e-6)
    Marker LLM: tibia_l (-0.00630897 -0.3766161 -0.04659212) fixed=true
    Marker LHEE: calcn_l (-0.0213479 0.01925187 0.005189753) fixed=true
    Marker LTOE: calcn_l (0.2188337 0.0279073 0.01559197) fixed=true
    Marker LMT5: calcn_l (0.1337514 0.01912884 -0.06250569) fixed=true
    Marker RGTRO: femur_r (-0.01680066 -0.020035 0.08199616) fixed=true
    Marker FRTHI: femur_r (0.05882579 -0.3014825 -0.05219335)
    Marker RLEK: femur_r (-0.003404842 -0.3769017 0.04977742) fixed=true
    Marker RATI: tibia_r (0.02198019 -0.1140392 -0.02098424)
    Marker RLM: tibia_r (-0.005727462 -0.3771936 0.04624364) fixed=true
    Marker RHEE: calcn_r (-0.02135435 0.0187904 -0.006725636) fixed=true
    Marker RTOE: calcn_r (0.2191482 0.02723664 -0.01485676) fixed=true
    Marker RMT5: calcn_r (0.1327819 0.02059706 0.0640827) fixed=true
